<?xml version='1.0' encoding='UTF-8'?>
<neuroml xmlns="http://www.neuroml.org/schema/neuroml2" xmlns:xsi="http://www.w3.org/2001/XMLSchema-instance" xsi:schemaLocation="http://www.neuroml.org/schema/neuroml2 https://raw.githubusercontent.com/NeuroML/NeuroML2/development/Schemas/NeuroML2/NeuroML_v2beta4.xsd" id="gvft_network_bio_prior_lamW_0_144_DF_0_019_t90_net">
  <notes>NeuroML2 network generated from GVFT simulation on 2025-05-04 14:45:57
</notes>
  <include href="AVAL.cell.nml"/>
  <include href="AVAR.cell.nml"/>
  <include href="AVKL.cell.nml"/>
  <include href="AVKR.cell.nml"/>
  <include href="RIS.cell.nml"/>
  <include href="RMDDL.cell.nml"/>
  <include href="RMDDR.cell.nml"/>
  <include href="RMDVL.cell.nml"/>
  <include href="RMDVR.cell.nml"/>
  <include href="SMBVL.cell.nml"/>
  <include href="SMBVR.cell.nml"/>
  <include href="URXL.cell.nml"/>
  <include href="URXR.cell.nml"/>
  <include href="I4.cell.nml"/>
  <include href="I1L.cell.nml"/>
  <include href="I1R.cell.nml"/>
  <include href="M2R.cell.nml"/>
  <include href="M4.cell.nml"/>
  <include href="I6.cell.nml"/>
  <include href="I2R.cell.nml"/>
  <include href="M3R.cell.nml"/>
  <include href="I5.cell.nml"/>
  <include href="MCR.cell.nml"/>
  <include href="M3L.cell.nml"/>
  <include href="MI.cell.nml"/>
  <include href="M1.cell.nml"/>
  <include href="MCL.cell.nml"/>
  <include href="I2L.cell.nml"/>
  <include href="M5.cell.nml"/>
  <include href="NSMR.cell.nml"/>
  <include href="M2L.cell.nml"/>
  <include href="NSML.cell.nml"/>
  <include href="I3.cell.nml"/>
  <include href="Generic_GJ.synapse.nml"/>
  <include href="Glutamate.synapse.nml"/>
  <include href="Acetylcholine.synapse.nml"/>
  <include href="Serotonin_Glutamate.synapse.nml"/>
  <network id="gvft_network_bio_prior_lamW_0_144_DF_0_019_t90_net" type="networkWithTemperature" temperature="20.0 degC">
    <population id="M1" component="M1" type="populationList" size="1">
      <instance id="0">
        <location x="-0.9698492" y="-0.0050251363" z="0.0"/>
      </instance>
    </population>
    <population id="M2L" component="M2L" type="populationList" size="1">
      <instance id="0">
        <location x="-0.03517589" y="0.10552765" z="0.0"/>
      </instance>
    </population>
    <population id="M2R" component="M2R" type="populationList" size="1">
      <instance id="0">
        <location x="0.5678392" y="0.28643218" z="0.0"/>
      </instance>
    </population>
    <population id="M3L" component="M3L" type="populationList" size="1">
      <instance id="0">
        <location x="0.80904526" y="-0.14572865" z="0.0"/>
      </instance>
    </population>
    <population id="M3R" component="M3R" type="populationList" size="1">
      <instance id="0">
        <location x="0.19597991" y="0.42713568" z="0.0"/>
      </instance>
    </population>
    <population id="M4" component="M4" type="populationList" size="1">
      <instance id="0">
        <location x="0.638191" y="0.26633167" z="0.0"/>
      </instance>
    </population>
    <population id="M5" component="M5" type="populationList" size="1">
      <instance id="0">
        <location x="-0.40703517" y="-0.43718594" z="0.0"/>
      </instance>
    </population>
    <population id="I1L" component="I1L" type="populationList" size="1">
      <instance id="0">
        <location x="0.7788945" y="-0.86934674" z="0.0"/>
      </instance>
    </population>
    <population id="I1R" component="I1R" type="populationList" size="1">
      <instance id="0">
        <location x="0.65829146" y="-0.80904526" z="0.0"/>
      </instance>
    </population>
    <population id="I2L" component="I2L" type="populationList" size="1">
      <instance id="0">
        <location x="0.59799" y="-0.44723618" z="0.0"/>
      </instance>
    </population>
    <population id="I2R" component="I2R" type="populationList" size="1">
      <instance id="0">
        <location x="-0.24623117" y="-0.3266332" z="0.0"/>
      </instance>
    </population>
    <population id="I3" component="I3" type="populationList" size="1">
      <instance id="0">
        <location x="-0.8190955" y="0.638191" z="0.0"/>
      </instance>
    </population>
    <population id="I4" component="I4" type="populationList" size="1">
      <instance id="0">
        <location x="0.3266332" y="0.095477395" z="0.0"/>
      </instance>
    </population>
    <population id="I5" component="I5" type="populationList" size="1">
      <instance id="0">
        <location x="-0.5477387" y="-0.41708544" z="0.0"/>
      </instance>
    </population>
    <population id="I6" component="I6" type="populationList" size="1">
      <instance id="0">
        <location x="0.959799" y="1.0" z="0.0"/>
      </instance>
    </population>
    <population id="MCL" component="MCL" type="populationList" size="1">
      <instance id="0">
        <location x="-0.6683417" y="0.68844223" z="0.0"/>
      </instance>
    </population>
    <population id="MCR" component="MCR" type="populationList" size="1">
      <instance id="0">
        <location x="0.095477395" y="-0.57788944" z="0.0"/>
      </instance>
    </population>
    <population id="MI" component="MI" type="populationList" size="1">
      <instance id="0">
        <location x="-0.8994975" y="0.919598" z="0.0"/>
      </instance>
    </population>
    <population id="NSML" component="NSML" type="populationList" size="1">
      <instance id="0">
        <location x="-0.36683416" y="0.55778897" z="0.0"/>
      </instance>
    </population>
    <population id="NSMR" component="NSMR" type="populationList" size="1">
      <instance id="0">
        <location x="0.7788945" y="0.51758796" z="0.0"/>
      </instance>
    </population>
    <population id="AVAL" component="AVAL" type="populationList" size="1">
      <instance id="0">
        <location x="5.0" y="0.0" z="0.0"/>
      </instance>
    </population>
    <population id="AVAR" component="AVAR" type="populationList" size="1">
      <instance id="0">
        <location x="5.0" y="0.0" z="0.0"/>
      </instance>
    </population>
    <population id="AVKL" component="AVKL" type="populationList" size="1">
      <instance id="0">
        <location x="5.0" y="0.0" z="0.0"/>
      </instance>
    </population>
    <population id="AVKR" component="AVKR" type="populationList" size="1">
      <instance id="0">
        <location x="5.0" y="0.0" z="0.0"/>
      </instance>
    </population>
    <population id="RIS" component="RIS" type="populationList" size="1">
      <instance id="0">
        <location x="5.0" y="0.0" z="0.0"/>
      </instance>
    </population>
    <population id="RMDDL" component="RMDDL" type="populationList" size="1">
      <instance id="0">
        <location x="5.0" y="0.0" z="0.0"/>
      </instance>
    </population>
    <population id="RMDDR" component="RMDDR" type="populationList" size="1">
      <instance id="0">
        <location x="5.0" y="0.0" z="0.0"/>
      </instance>
    </population>
    <population id="RMDVL" component="RMDVL" type="populationList" size="1">
      <instance id="0">
        <location x="5.0" y="0.0" z="0.0"/>
      </instance>
    </population>
    <population id="RMDVR" component="RMDVR" type="populationList" size="1">
      <instance id="0">
        <location x="5.0" y="0.0" z="0.0"/>
      </instance>
    </population>
    <population id="SMBVL" component="SMBVL" type="populationList" size="1">
      <instance id="0">
        <location x="5.0" y="0.0" z="0.0"/>
      </instance>
    </population>
    <population id="SMBVR" component="SMBVR" type="populationList" size="1">
      <instance id="0">
        <location x="5.0" y="0.0" z="0.0"/>
      </instance>
    </population>
    <population id="URXL" component="URXL" type="populationList" size="1">
      <instance id="0">
        <location x="5.0" y="0.0" z="0.0"/>
      </instance>
    </population>
    <population id="URXR" component="URXR" type="populationList" size="1">
      <instance id="0">
        <location x="5.0" y="0.0" z="0.0"/>
      </instance>
    </population>
    <electricalProjection id="NCXLS_M2R_M3L_GJ" presynapticPopulation="M2R" postsynapticPopulation="M3L">
      <electricalConnection id="0" preCell="0" postCell="0" synapse="Generic_GJ" preSegment="1" postSegment="1" preFractionAlong="0.5409050038380808" postFractionAlong="0.6964298070361072"/>
    </electricalProjection>
    <electricalProjection id="NCXLS_M1_M2R_GJ" presynapticPopulation="M1" postsynapticPopulation="M2R">
      <electricalConnection id="1" preCell="0" postCell="0" synapse="Generic_GJ" preSegment="1" postSegment="2" preFractionAlong="0.3275521651801324" postFractionAlong="0.5466852550992888"/>
    </electricalProjection>
    <electricalProjection id="NCXLS_M1_M3L_GJ" presynapticPopulation="M1" postsynapticPopulation="M3L">
      <electricalConnection id="2" preCell="0" postCell="0" synapse="Generic_GJ" preSegment="1" postSegment="2" preFractionAlong="0.022141475472629457" postFractionAlong="0.9451141887560087"/>
    </electricalProjection>
    <projection id="NCXLS_M2R_MCR" presynapticPopulation="M2R" postsynapticPopulation="MCR" synapse="Acetylcholine">
      <connection id="3" preCellId="../M2R/0/M2R" postCellId="../MCR/0/MCR" preSegmentId="1" postSegmentId="5" preFractionAlong="0.11720390568023342" postFractionAlong="0.33720657556575206"/>
    </projection>
    <projection id="NCXLS_M2R_M5" presynapticPopulation="M2R" postsynapticPopulation="M5" synapse="Glutamate">
      <connection id="4" preCellId="../M2R/0/M2R" postCellId="../M5/0/M5" preSegmentId="8" postSegmentId="1" preFractionAlong="0.2062521138361526" postFractionAlong="0.391859373188026"/>
    </projection>
    <projection id="NCXLS_M2R_I2R" presynapticPopulation="M2R" postsynapticPopulation="I2R" synapse="Acetylcholine">
      <connection id="5" preCellId="../M2R/0/M2R" postCellId="../I2R/0/I2R" preSegmentId="1" postSegmentId="3" preFractionAlong="0.2043163833989703" postFractionAlong="0.5078050639587791"/>
    </projection>
    <projection id="NCXLS_M2R_I4" presynapticPopulation="M2R" postsynapticPopulation="I4" synapse="Acetylcholine">
      <connection id="6" preCellId="../M2R/0/M2R" postCellId="../I4/0/I4" preSegmentId="5" postSegmentId="1" preFractionAlong="0.018124041045729733" postFractionAlong="0.7927581135728128"/>
    </projection>
    <projection id="NCXLS_M2R_M4" presynapticPopulation="M2R" postsynapticPopulation="M4" synapse="Glutamate">
      <connection id="7" preCellId="../M2R/0/M2R" postCellId="../M4/0/M4" preSegmentId="9" postSegmentId="3" preFractionAlong="0.5606782949389499" postFractionAlong="0.6284264566145871"/>
    </projection>
    <projection id="NCXLS_M2R_I1L" presynapticPopulation="M2R" postsynapticPopulation="I1L" synapse="Acetylcholine">
      <connection id="8" preCellId="../M2R/0/M2R" postCellId="../I1L/0/I1L" preSegmentId="9" postSegmentId="6" preFractionAlong="0.723443662354912" postFractionAlong="0.5356565993475786"/>
    </projection>
    <projection id="NCXLS_M2R_I5" presynapticPopulation="M2R" postsynapticPopulation="I5" synapse="Acetylcholine">
      <connection id="9" preCellId="../M2R/0/M2R" postCellId="../I5/0/I5" preSegmentId="1" postSegmentId="9" preFractionAlong="0.874170682157026" postFractionAlong="0.2034364751360912"/>
    </projection>
    <projection id="NCXLS_M2R_I2L" presynapticPopulation="M2R" postsynapticPopulation="I2L" synapse="Acetylcholine">
      <connection id="10" preCellId="../M2R/0/M2R" postCellId="../I2L/0/I2L" preSegmentId="3" postSegmentId="6" preFractionAlong="0.79155820259137" postFractionAlong="0.45129411302925493"/>
    </projection>
    <projection id="NCXLS_M2R_I1R" presynapticPopulation="M2R" postsynapticPopulation="I1R" synapse="Acetylcholine">
      <connection id="11" preCellId="../M2R/0/M2R" postCellId="../I1R/0/I1R" preSegmentId="3" postSegmentId="3" preFractionAlong="0.8549740195614743" postFractionAlong="0.8825598767723473"/>
    </projection>
    <projection id="NCXLS_MCR_I1L" presynapticPopulation="MCR" postsynapticPopulation="I1L" synapse="Acetylcholine">
      <connection id="12" preCellId="../MCR/0/MCR" postCellId="../I1L/0/I1L" preSegmentId="3" postSegmentId="5" preFractionAlong="0.4097392364429391" postFractionAlong="0.6477742329503421"/>
    </projection>
    <projection id="NCXLS_MCR_I1R" presynapticPopulation="MCR" postsynapticPopulation="I1R" synapse="Acetylcholine">
      <connection id="13" preCellId="../MCR/0/MCR" postCellId="../I1R/0/I1R" preSegmentId="2" postSegmentId="3" preFractionAlong="0.28088196518624375" postFractionAlong="0.20795635928938994"/>
    </projection>
    <projection id="NCXLS_M5_I5" presynapticPopulation="M5" postsynapticPopulation="I5" synapse="Acetylcholine">
      <connection id="14" preCellId="../M5/0/M5" postCellId="../I5/0/I5" preSegmentId="8" postSegmentId="6" preFractionAlong="0.4792600899145375" postFractionAlong="0.1817232932281565"/>
    </projection>
    <projection id="NCXLS_M5_M1" presynapticPopulation="M5" postsynapticPopulation="M1" synapse="Acetylcholine">
      <connection id="15" preCellId="../M5/0/M5" postCellId="../M1/0/M1" preSegmentId="8" postSegmentId="4" preFractionAlong="0.8479278837633485" postFractionAlong="0.5455851826691478"/>
    </projection>
    <projection id="NCXLS_MCL_MI" presynapticPopulation="MCL" postsynapticPopulation="MI" synapse="Acetylcholine">
      <connection id="16" preCellId="../MCL/0/MCL" postCellId="../MI/0/MI" preSegmentId="1" postSegmentId="2" preFractionAlong="0.3754689284665004" postFractionAlong="0.8038145451934468"/>
    </projection>
    <projection id="NCXLS_MCL_I3" presynapticPopulation="MCL" postsynapticPopulation="I3" synapse="Acetylcholine">
      <connection id="17" preCellId="../MCL/0/MCL" postCellId="../I3/0/I3" preSegmentId="4" postSegmentId="3" preFractionAlong="0.22011132590475313" postFractionAlong="0.3505205342861618"/>
    </projection>
    <projection id="NCXLS_M3L_MCR" presynapticPopulation="M3L" postsynapticPopulation="MCR" synapse="Acetylcholine">
      <connection id="18" preCellId="../M3L/0/M3L" postCellId="../MCR/0/MCR" preSegmentId="8" postSegmentId="7" preFractionAlong="0.36957419942677316" postFractionAlong="0.4642385197392249"/>
    </projection>
    <projection id="NCXLS_M3L_MI" presynapticPopulation="M3L" postsynapticPopulation="MI" synapse="Acetylcholine">
      <connection id="19" preCellId="../M3L/0/M3L" postCellId="../MI/0/MI" preSegmentId="4" postSegmentId="2" preFractionAlong="0.6616842883998565" postFractionAlong="0.48398936817974714"/>
    </projection>
    <projection id="NCXLS_M3L_M5" presynapticPopulation="M3L" postsynapticPopulation="M5" synapse="Acetylcholine">
      <connection id="20" preCellId="../M3L/0/M3L" postCellId="../M5/0/M5" preSegmentId="2" postSegmentId="8" preFractionAlong="0.5484191629935626" postFractionAlong="0.06646332577627212"/>
    </projection>
    <projection id="NCXLS_M3L_MCL" presynapticPopulation="M3L" postsynapticPopulation="MCL" synapse="Acetylcholine">
      <connection id="21" preCellId="../M3L/0/M3L" postCellId="../MCL/0/MCL" preSegmentId="8" postSegmentId="9" preFractionAlong="0.583713587731364" postFractionAlong="0.7819599771579592"/>
    </projection>
    <projection id="NCXLS_M3L_I2R" presynapticPopulation="M3L" postsynapticPopulation="I2R" synapse="Acetylcholine">
      <connection id="22" preCellId="../M3L/0/M3L" postCellId="../I2R/0/I2R" preSegmentId="7" postSegmentId="4" preFractionAlong="0.140324518193515" postFractionAlong="0.6711574733796887"/>
    </projection>
    <projection id="NCXLS_M3L_I3" presynapticPopulation="M3L" postsynapticPopulation="I3" synapse="Acetylcholine">
      <connection id="23" preCellId="../M3L/0/M3L" postCellId="../I3/0/I3" preSegmentId="7" postSegmentId="9" preFractionAlong="0.3469626597345584" postFractionAlong="0.3907551523296371"/>
    </projection>
    <projection id="NCXLS_M3L_I4" presynapticPopulation="M3L" postsynapticPopulation="I4" synapse="Acetylcholine">
      <connection id="24" preCellId="../M3L/0/M3L" postCellId="../I4/0/I4" preSegmentId="1" postSegmentId="7" preFractionAlong="0.6054117575075872" postFractionAlong="0.4331631113151664"/>
    </projection>
    <projection id="NCXLS_M3L_NSML" presynapticPopulation="M3L" postsynapticPopulation="NSML" synapse="Acetylcholine">
      <connection id="25" preCellId="../M3L/0/M3L" postCellId="../NSML/0/NSML" preSegmentId="4" postSegmentId="5" preFractionAlong="0.5416464182167599" postFractionAlong="0.7582672920560591"/>
    </projection>
    <projection id="NCXLS_M3L_I1L" presynapticPopulation="M3L" postsynapticPopulation="I1L" synapse="Acetylcholine">
      <connection id="26" preCellId="../M3L/0/M3L" postCellId="../I1L/0/I1L" preSegmentId="6" postSegmentId="8" preFractionAlong="0.5885049351589888" postFractionAlong="0.18537277908251149"/>
    </projection>
    <projection id="NCXLS_M3L_I5" presynapticPopulation="M3L" postsynapticPopulation="I5" synapse="Acetylcholine">
      <connection id="27" preCellId="../M3L/0/M3L" postCellId="../I5/0/I5" preSegmentId="2" postSegmentId="1" preFractionAlong="0.5846680901658248" postFractionAlong="0.133650581410518"/>
    </projection>
    <projection id="NCXLS_M3L_M2L" presynapticPopulation="M3L" postsynapticPopulation="M2L" synapse="Acetylcholine">
      <connection id="28" preCellId="../M3L/0/M3L" postCellId="../M2L/0/M2L" preSegmentId="3" postSegmentId="7" preFractionAlong="0.6595107686407702" postFractionAlong="0.7962414505413685"/>
    </projection>
    <projection id="NCXLS_M3L_I2L" presynapticPopulation="M3L" postsynapticPopulation="I2L" synapse="Acetylcholine">
      <connection id="29" preCellId="../M3L/0/M3L" postCellId="../I2L/0/I2L" preSegmentId="6" postSegmentId="9" preFractionAlong="0.2640619846937188" postFractionAlong="0.9390684794502916"/>
    </projection>
    <projection id="NCXLS_M3L_M1" presynapticPopulation="M3L" postsynapticPopulation="M1" synapse="Acetylcholine">
      <connection id="30" preCellId="../M3L/0/M3L" postCellId="../M1/0/M1" preSegmentId="1" postSegmentId="5" preFractionAlong="0.6946409588937278" postFractionAlong="0.2187156129979273"/>
    </projection>
    <projection id="NCXLS_M3L_I1R" presynapticPopulation="M3L" postsynapticPopulation="I1R" synapse="Acetylcholine">
      <connection id="31" preCellId="../M3L/0/M3L" postCellId="../I1R/0/I1R" preSegmentId="4" postSegmentId="7" preFractionAlong="0.26463502692535734" postFractionAlong="0.6619689447938686"/>
    </projection>
    <projection id="NCXLS_M3R_MI" presynapticPopulation="M3R" postsynapticPopulation="MI" synapse="Acetylcholine">
      <connection id="32" preCellId="../M3R/0/M3R" postCellId="../MI/0/MI" preSegmentId="4" postSegmentId="7" preFractionAlong="0.9833056568184674" postFractionAlong="0.7867083407073091"/>
    </projection>
    <projection id="NCXLS_M3R_MCL" presynapticPopulation="M3R" postsynapticPopulation="MCL" synapse="Acetylcholine">
      <connection id="33" preCellId="../M3R/0/M3R" postCellId="../MCL/0/MCL" preSegmentId="5" postSegmentId="4" preFractionAlong="0.3683472137943513" postFractionAlong="0.4323462264033473"/>
    </projection>
    <projection id="NCXLS_M3R_I3" presynapticPopulation="M3R" postsynapticPopulation="I3" synapse="Acetylcholine">
      <connection id="34" preCellId="../M3R/0/M3R" postCellId="../I3/0/I3" preSegmentId="1" postSegmentId="5" preFractionAlong="0.2595764492750492" postFractionAlong="0.03367640387446402"/>
    </projection>
    <projection id="NCXLS_M3R_NSML" presynapticPopulation="M3R" postsynapticPopulation="NSML" synapse="Acetylcholine">
      <connection id="35" preCellId="../M3R/0/M3R" postCellId="../NSML/0/NSML" preSegmentId="5" postSegmentId="3" preFractionAlong="0.8243268918792692" postFractionAlong="0.6300398784799822"/>
    </projection>
    <projection id="NCXLS_M3R_I6" presynapticPopulation="M3R" postsynapticPopulation="I6" synapse="Acetylcholine">
      <connection id="36" preCellId="../M3R/0/M3R" postCellId="../I6/0/I6" preSegmentId="2" postSegmentId="6" preFractionAlong="0.4289849318408905" postFractionAlong="0.20106515204994513"/>
    </projection>
    <projection id="NCXLS_M4_M3L" presynapticPopulation="M4" postsynapticPopulation="M3L" synapse="Glutamate">
      <connection id="37" preCellId="../M4/0/M4" postCellId="../M3L/0/M3L" preSegmentId="8" postSegmentId="8" preFractionAlong="0.7362288825285501" postFractionAlong="0.436419598729593"/>
    </projection>
    <projection id="NCXLS_M4_I1L" presynapticPopulation="M4" postsynapticPopulation="I1L" synapse="Acetylcholine">
      <connection id="38" preCellId="../M4/0/M4" postCellId="../I1L/0/I1L" preSegmentId="6" postSegmentId="2" preFractionAlong="0.844871347755229" postFractionAlong="0.2490087361090899"/>
    </projection>
    <projection id="NCXLS_M4_I2L" presynapticPopulation="M4" postsynapticPopulation="I2L" synapse="Acetylcholine">
      <connection id="39" preCellId="../M4/0/M4" postCellId="../I2L/0/I2L" preSegmentId="6" postSegmentId="6" preFractionAlong="0.09491793682166971" postFractionAlong="0.9988926120332906"/>
    </projection>
    <projection id="NCXLS_M4_NSMR" presynapticPopulation="M4" postsynapticPopulation="NSMR" synapse="Acetylcholine">
      <connection id="40" preCellId="../M4/0/M4" postCellId="../NSMR/0/NSMR" preSegmentId="3" postSegmentId="3" preFractionAlong="0.571162298622361" postFractionAlong="0.3040302724479996"/>
    </projection>
    <projection id="NCXLS_M4_I1R" presynapticPopulation="M4" postsynapticPopulation="I1R" synapse="Acetylcholine">
      <connection id="41" preCellId="../M4/0/M4" postCellId="../I1R/0/I1R" preSegmentId="1" postSegmentId="3" preFractionAlong="0.022425889162055124" postFractionAlong="0.3604268271414861"/>
    </projection>
    <projection id="NCXLS_M4_I6" presynapticPopulation="M4" postsynapticPopulation="I6" synapse="Acetylcholine">
      <connection id="42" preCellId="../M4/0/M4" postCellId="../I6/0/I6" preSegmentId="3" postSegmentId="6" preFractionAlong="0.5661806912250709" postFractionAlong="0.31277798921035405"/>
    </projection>
    <projection id="NCXLS_M2L_M2R" presynapticPopulation="M2L" postsynapticPopulation="M2R" synapse="Glutamate">
      <connection id="43" preCellId="../M2L/0/M2L" postCellId="../M2R/0/M2R" preSegmentId="5" postSegmentId="3" preFractionAlong="0.015742912995676983" postFractionAlong="0.017149781915198115"/>
    </projection>
    <projection id="NCXLS_M2L_MCR" presynapticPopulation="M2L" postsynapticPopulation="MCR" synapse="Acetylcholine">
      <connection id="44" preCellId="../M2L/0/M2L" postCellId="../MCR/0/MCR" preSegmentId="8" postSegmentId="2" preFractionAlong="0.7061585021190541" postFractionAlong="0.30895599006815266"/>
    </projection>
    <projection id="NCXLS_M2L_I2R" presynapticPopulation="M2L" postsynapticPopulation="I2R" synapse="Acetylcholine">
      <connection id="45" preCellId="../M2L/0/M2L" postCellId="../I2R/0/I2R" preSegmentId="7" postSegmentId="3" preFractionAlong="0.938413743858144" postFractionAlong="0.4148151193889472"/>
    </projection>
    <projection id="NCXLS_M2L_M3L" presynapticPopulation="M2L" postsynapticPopulation="M3L" synapse="Acetylcholine">
      <connection id="46" preCellId="../M2L/0/M2L" postCellId="../M3L/0/M3L" preSegmentId="3" postSegmentId="9" preFractionAlong="0.06932833038776476" postFractionAlong="0.6383222397918266"/>
    </projection>
    <projection id="NCXLS_M2L_I4" presynapticPopulation="M2L" postsynapticPopulation="I4" synapse="Acetylcholine">
      <connection id="47" preCellId="../M2L/0/M2L" postCellId="../I4/0/I4" preSegmentId="3" postSegmentId="2" preFractionAlong="0.7073970000329277" postFractionAlong="0.3892304716917885"/>
    </projection>
    <projection id="NCXLS_M2L_M4" presynapticPopulation="M2L" postsynapticPopulation="M4" synapse="Glutamate">
      <connection id="48" preCellId="../M2L/0/M2L" postCellId="../M4/0/M4" preSegmentId="4" postSegmentId="3" preFractionAlong="0.868410787941382" postFractionAlong="0.379127658375647"/>
    </projection>
    <projection id="NCXLS_M2L_I1L" presynapticPopulation="M2L" postsynapticPopulation="I1L" synapse="Acetylcholine">
      <connection id="49" preCellId="../M2L/0/M2L" postCellId="../I1L/0/I1L" preSegmentId="2" postSegmentId="7" preFractionAlong="0.6185270587181856" postFractionAlong="0.633072653499513"/>
    </projection>
    <projection id="NCXLS_M2L_I2L" presynapticPopulation="M2L" postsynapticPopulation="I2L" synapse="Acetylcholine">
      <connection id="50" preCellId="../M2L/0/M2L" postCellId="../I2L/0/I2L" preSegmentId="5" postSegmentId="3" preFractionAlong="0.4430593623304211" postFractionAlong="0.4941476706378827"/>
    </projection>
    <projection id="NCXLS_M2L_NSMR" presynapticPopulation="M2L" postsynapticPopulation="NSMR" synapse="Acetylcholine">
      <connection id="51" preCellId="../M2L/0/M2L" postCellId="../NSMR/0/NSMR" preSegmentId="6" postSegmentId="1" preFractionAlong="0.46116690125391" postFractionAlong="0.9399317919698225"/>
    </projection>
    <projection id="NCXLS_M2L_I1R" presynapticPopulation="M2L" postsynapticPopulation="I1R" synapse="Acetylcholine">
      <connection id="52" preCellId="../M2L/0/M2L" postCellId="../I1R/0/I1R" preSegmentId="2" postSegmentId="7" preFractionAlong="0.863641421296616" postFractionAlong="0.11006328420111522"/>
    </projection>
    <projection id="NCXLS_M2L_I6" presynapticPopulation="M2L" postsynapticPopulation="I6" synapse="Acetylcholine">
      <connection id="53" preCellId="../M2L/0/M2L" postCellId="../I6/0/I6" preSegmentId="5" postSegmentId="5" preFractionAlong="0.05439074852231118" postFractionAlong="0.6442567236508115"/>
    </projection>
    <projection id="NCXLS_M1_MCR" presynapticPopulation="M1" postsynapticPopulation="MCR" synapse="Acetylcholine">
      <connection id="54" preCellId="../M1/0/M1" postCellId="../MCR/0/MCR" preSegmentId="9" postSegmentId="9" preFractionAlong="0.06980065461462892" postFractionAlong="0.5546877097800863"/>
    </projection>
    <projection id="NCXLS_M1_M5" presynapticPopulation="M1" postsynapticPopulation="M5" synapse="Glutamate">
      <connection id="55" preCellId="../M1/0/M1" postCellId="../M5/0/M5" preSegmentId="1" postSegmentId="7" preFractionAlong="0.5993021161394377" postFractionAlong="0.17935601028924097"/>
    </projection>
    <projection id="NCXLS_M1_MCL" presynapticPopulation="M1" postsynapticPopulation="MCL" synapse="Acetylcholine">
      <connection id="56" preCellId="../M1/0/M1" postCellId="../MCL/0/MCL" preSegmentId="6" postSegmentId="6" preFractionAlong="0.5797261570972247" postFractionAlong="0.4529110702676108"/>
    </projection>
    <projection id="NCXLS_M1_I2R" presynapticPopulation="M1" postsynapticPopulation="I2R" synapse="Acetylcholine">
      <connection id="57" preCellId="../M1/0/M1" postCellId="../I2R/0/I2R" preSegmentId="2" postSegmentId="4" preFractionAlong="0.6853953434460057" postFractionAlong="0.02496622212005717"/>
    </projection>
    <projection id="NCXLS_M1_I3" presynapticPopulation="M1" postsynapticPopulation="I3" synapse="Acetylcholine">
      <connection id="58" preCellId="../M1/0/M1" postCellId="../I3/0/I3" preSegmentId="8" postSegmentId="6" preFractionAlong="0.6857005429336439" postFractionAlong="0.9102130348677566"/>
    </projection>
    <projection id="NCXLS_M1_M3R" presynapticPopulation="M1" postsynapticPopulation="M3R" synapse="Glutamate">
      <connection id="59" preCellId="../M1/0/M1" postCellId="../M3R/0/M3R" preSegmentId="8" postSegmentId="2" preFractionAlong="0.5726072328820224" postFractionAlong="0.2770125243259788"/>
    </projection>
    <projection id="NCXLS_M1_I4" presynapticPopulation="M1" postsynapticPopulation="I4" synapse="Acetylcholine">
      <connection id="60" preCellId="../M1/0/M1" postCellId="../I4/0/I4" preSegmentId="4" postSegmentId="6" preFractionAlong="0.5831908042770976" postFractionAlong="0.5928401805081102"/>
    </projection>
    <projection id="NCXLS_M1_NSML" presynapticPopulation="M1" postsynapticPopulation="NSML" synapse="Acetylcholine">
      <connection id="61" preCellId="../M1/0/M1" postCellId="../NSML/0/NSML" preSegmentId="8" postSegmentId="6" preFractionAlong="0.7026402058582288" postFractionAlong="0.06652760821085524"/>
    </projection>
    <projection id="NCXLS_M1_M4" presynapticPopulation="M1" postsynapticPopulation="M4" synapse="Acetylcholine">
      <connection id="62" preCellId="../M1/0/M1" postCellId="../M4/0/M4" preSegmentId="1" postSegmentId="4" preFractionAlong="0.8809730056396574" postFractionAlong="0.8829148165187222"/>
    </projection>
    <projection id="NCXLS_M1_I1L" presynapticPopulation="M1" postsynapticPopulation="I1L" synapse="Acetylcholine">
      <connection id="63" preCellId="../M1/0/M1" postCellId="../I1L/0/I1L" preSegmentId="7" postSegmentId="8" preFractionAlong="0.1966535849529587" postFractionAlong="0.7374260857706773"/>
    </projection>
    <projection id="NCXLS_M1_I5" presynapticPopulation="M1" postsynapticPopulation="I5" synapse="Acetylcholine">
      <connection id="64" preCellId="../M1/0/M1" postCellId="../I5/0/I5" preSegmentId="8" postSegmentId="9" preFractionAlong="0.9972378999036027" postFractionAlong="0.030026005329392813"/>
    </projection>
    <projection id="NCXLS_M1_M2L" presynapticPopulation="M1" postsynapticPopulation="M2L" synapse="Acetylcholine">
      <connection id="65" preCellId="../M1/0/M1" postCellId="../M2L/0/M2L" preSegmentId="1" postSegmentId="7" preFractionAlong="0.6189915646985882" postFractionAlong="0.940773299689501"/>
    </projection>
    <projection id="NCXLS_M1_I2L" presynapticPopulation="M1" postsynapticPopulation="I2L" synapse="Acetylcholine">
      <connection id="66" preCellId="../M1/0/M1" postCellId="../I2L/0/I2L" preSegmentId="5" postSegmentId="4" preFractionAlong="0.347507082425181" postFractionAlong="0.4353936461757356"/>
    </projection>
    <projection id="NCXLS_M1_NSMR" presynapticPopulation="M1" postsynapticPopulation="NSMR" synapse="Acetylcholine">
      <connection id="67" preCellId="../M1/0/M1" postCellId="../NSMR/0/NSMR" preSegmentId="1" postSegmentId="1" preFractionAlong="0.8525474212459705" postFractionAlong="0.9379652314338942"/>
    </projection>
    <projection id="NCXLS_M1_I1R" presynapticPopulation="M1" postsynapticPopulation="I1R" synapse="Acetylcholine">
      <connection id="68" preCellId="../M1/0/M1" postCellId="../I1R/0/I1R" preSegmentId="3" postSegmentId="2" preFractionAlong="0.07103488904400213" postFractionAlong="0.21079310155002862"/>
    </projection>
    <projection id="NCXLS_M1_I6" presynapticPopulation="M1" postsynapticPopulation="I6" synapse="Acetylcholine">
      <connection id="69" preCellId="../M1/0/M1" postCellId="../I6/0/I6" preSegmentId="2" postSegmentId="4" preFractionAlong="0.05522252074302847" postFractionAlong="0.9423834540022769"/>
    </projection>
    <projection id="NC_I1L_RMDDL" presynapticPopulation="I1L" postsynapticPopulation="RMDDL" synapse="Acetylcholine">
      <connection id="70" preCellId="../I1L/0/I1L" postCellId="../RMDDL/0/RMDDL" preSegmentId="4" postSegmentId="5" preFractionAlong="0.5298812610885262" postFractionAlong="0.9853038322872855"/>
    </projection>
    <projection id="NC_I1L_RMDVL" presynapticPopulation="I1L" postsynapticPopulation="RMDVL" synapse="Acetylcholine">
      <connection id="71" preCellId="../I1L/0/I1L" postCellId="../RMDVL/0/RMDVL" preSegmentId="9" postSegmentId="8" preFractionAlong="0.11443151861235856" postFractionAlong="0.008706147062543579"/>
    </projection>
    <projection id="NC_I1R_RMDDR" presynapticPopulation="I1R" postsynapticPopulation="RMDDR" synapse="Acetylcholine">
      <connection id="72" preCellId="../I1R/0/I1R" postCellId="../RMDDR/0/RMDDR" preSegmentId="7" postSegmentId="8" preFractionAlong="0.20727297906766762" postFractionAlong="0.6305809415830923"/>
    </projection>
    <projection id="NC_I1R_RMDVR" presynapticPopulation="I1R" postsynapticPopulation="RMDVR" synapse="Acetylcholine">
      <connection id="73" preCellId="../I1R/0/I1R" postCellId="../RMDVR/0/RMDVR" preSegmentId="8" postSegmentId="7" preFractionAlong="0.36559570100396677" postFractionAlong="0.35369668658073394"/>
    </projection>
    <projection id="NC_I2L_URXL" presynapticPopulation="I2L" postsynapticPopulation="URXL" synapse="Glutamate">
      <connection id="74" preCellId="../I2L/0/I2L" postCellId="../URXL/0/URXL" preSegmentId="4" postSegmentId="5" preFractionAlong="0.17011541730928148" postFractionAlong="0.8982380639532351"/>
    </projection>
    <projection id="NC_I2R_URXR" presynapticPopulation="I2R" postsynapticPopulation="URXR" synapse="Glutamate">
      <connection id="75" preCellId="../I2R/0/I2R" postCellId="../URXR/0/URXR" preSegmentId="2" postSegmentId="6" preFractionAlong="0.8646589218581401" postFractionAlong="0.15492531114344266"/>
    </projection>
    <projection id="NC_AVKL_I1L" presynapticPopulation="AVKL" postsynapticPopulation="I1L" synapse="Acetylcholine">
      <connection id="76" preCellId="../AVKL/0/AVKL" postCellId="../I1L/0/I1L" preSegmentId="7" postSegmentId="6" preFractionAlong="0.48453799508001083" postFractionAlong="0.3024195112785364"/>
    </projection>
    <projection id="NC_AVKR_I1R" presynapticPopulation="AVKR" postsynapticPopulation="I1R" synapse="Acetylcholine">
      <connection id="77" preCellId="../AVKR/0/AVKR" postCellId="../I1R/0/I1R" preSegmentId="5" postSegmentId="6" preFractionAlong="0.7805560268872138" postFractionAlong="0.30362393814384026"/>
    </projection>
    <projection id="NC_RIS_I1L" presynapticPopulation="RIS" postsynapticPopulation="I1L" synapse="Glutamate">
      <connection id="78" preCellId="../RIS/0/RIS" postCellId="../I1L/0/I1L" preSegmentId="8" postSegmentId="3" preFractionAlong="0.0031409060481221163" postFractionAlong="0.17424340164537955"/>
    </projection>
    <projection id="NC_RIS_I1R" presynapticPopulation="RIS" postsynapticPopulation="I1R" synapse="Glutamate">
      <connection id="79" preCellId="../RIS/0/RIS" postCellId="../I1R/0/I1R" preSegmentId="7" postSegmentId="1" preFractionAlong="0.4417464916377071" postFractionAlong="0.984234499234434"/>
    </projection>
    <projection id="NC_AVAL_I2L" presynapticPopulation="AVAL" postsynapticPopulation="I2L" synapse="Acetylcholine">
      <connection id="80" preCellId="../AVAL/0/AVAL" postCellId="../I2L/0/I2L" preSegmentId="9" postSegmentId="7" preFractionAlong="0.05697872699736828" postFractionAlong="0.41860727491832994"/>
    </projection>
    <projection id="NC_AVAR_I2R" presynapticPopulation="AVAR" postsynapticPopulation="I2R" synapse="Acetylcholine">
      <connection id="81" preCellId="../AVAR/0/AVAR" postCellId="../I2R/0/I2R" preSegmentId="9" postSegmentId="6" preFractionAlong="0.7250060762991187" postFractionAlong="0.574287575090211"/>
    </projection>
    <projection id="NC_SMBVL_I4" presynapticPopulation="SMBVL" postsynapticPopulation="I4" synapse="Acetylcholine">
      <connection id="82" preCellId="../SMBVL/0/SMBVL" postCellId="../I4/0/I4" preSegmentId="3" postSegmentId="8" preFractionAlong="0.6642017130717857" postFractionAlong="0.19924595440831405"/>
    </projection>
    <projection id="NC_SMBVR_I4" presynapticPopulation="SMBVR" postsynapticPopulation="I4" synapse="Acetylcholine">
      <connection id="83" preCellId="../SMBVR/0/SMBVR" postCellId="../I4/0/I4" preSegmentId="7" postSegmentId="7" preFractionAlong="0.5625552012730474" postFractionAlong="0.7651603288167663"/>
    </projection>
  </network>
</neuroml>
